# OpenSim document version 40500
AnalyzeTool MimicMSK_FK:
  model_file: MimicMSK_OpenSim.osim
  replace_force_set: false
  results_directory: FK_results
  output_precision: 8
  initial_time: 0
  final_time: 5.61171
  solve_for_equilibrium_for_auxiliary_states: false
  maximum_number_of_integrator_steps: 20000
  maximum_integrator_step_size: 1
  minimum_integrator_step_size: 1e-8
  integrator_error_tolerance: 1e-5
  coordinates_file: MimicMSK_OpenSim_coordinates_FK_5s.mot
  lowpass_cutoff_frequency_for_coordinates: -1
  AnalysisSet Analyses:
    Kinematics: coordinates=all start_time=-Inf end_time=Inf step_interval=1 in_degrees=true
